# Рассчёт Эллиптического фильтра
# https://ru.dsplib.org/content/filter_ellip_ap/filter_ellip_ap.html
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db(x) := 10^(x/20)
db_P(x) := 10^(x/10)
to_db(x) := 20*log(|x|)
to_dbP(x) := 10*log(|x|)
roundup(x) := Trunc(x, 1) + (Trunc(x, 1) ≠ x)
abs(z) := |z|
samples := 100
n := 0 .. samples - 1
circle_x[n] := cos(2*π/(samples - 1)*n)
circle_y[n] := sin(2*π/(samples - 1)*n)
Ki(k) :=
    k_0 ← k/(1 + sqrt(1 - k*k))
    k_0*k_0
K(k) :=
    ki ← Ki(k)
    (1 + ki)*K(ki) if k - ki > 0
    π/2 otherwise
T(k) := K(sqrt(1 - k*k))
sn(u, k) :=
    ki ← Ki(k)
    sin(u*π/2) if k - ki ≤ 0
    otherwise
        w ← sn(u, ki)
        (1 + ki)/(1/w + ki*w)
cd(u, k) :=
    ki ← Ki(k)
    cos(u*π/2) if k - ki ≤ 0
    otherwise
        w ← cd(u, ki)
        (1 + ki)/(1/w + ki*w)
sn_inv(sn, k) :=
    ki ← Ki(k)
    sn_inv(2*sn/((1 + ki)*(1 + sqrt(1 - k*k*sn*sn))), ki) if k - ki > 0
    2*asin(sn)/π
cd_inv(cn, k) :=
    ki ← Ki(k)
    cd_inv(2*cn/((1 + ki)*(1 + sqrt(1 - k*k*cn*cn))), ki) if k - ki > 0
    2*acos(cn)/π
K(0.66667) = 1.80967
T(0.66667) = 1.90424
K(0.0028615) = 1.5708
T(0.0028615) = 7.24272
Z(p_0, f_d) := (2*f_d + p_0)/(2*f_d - p_0)
z2p(z_0, f_d) := 2*f_d*(1 - z_0^-1)/(1 + z_0^-1)
cd(0.6, 0.93) = 0.761809
sn(0.6, 0.93) = 0.917919
# 0.917918 | 0.761809423
f_p := 500 = 500
# Гц - частота пропускания
f_d := 5000  # Гц - частота дискретизации
f_s := 1500 = 1500
# Гц - частота подавления
dt := 1/f_d = 0.0002
tt[n] := n*dt
h(t, H) := 1/f_d*integral(H(f)*e^(1i*2*π*f*t), f = -f_d/2 .. f_d/2)
ω_p := 2*π*f_p/f_d = 0.2*π
# Нормированная полоса среза
ω_p = 0.628319
ω_s := 2*π*f_s/f_d = 0.6*π
# Нормированная полоса заграждения
ω_s = 1.88496
R_p := 1
G_p := (-R_p) db = 0.891251  # Неравномерность в полосе пропускания (дБ)
R_s := 30
G_s := (-R_s) db = 0.0316228  # Уровень подавления в полосе заграждения (дБ)
df := f_d/samples = 50
Ω(T_d, ω) := 2/T_d*tan(ω/2)  # Преобразование частот аналогового фильтра в частоты цифрового
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f_analog(f_digital., f_d) := f_d/π*tan(π*f_digital./f_d)
f_digit(f_analog, f_d) := f_d/π*atan(π*f_analog/f_d)
F_p := f_analog(f_p, f_d) = 517.126
F_p = 0.103425 f_d
f_digit(F_p, f_d) = 500
F_s := f_analog(f_s, f_d) = 2190.58
F_s = 0.438116 f_d
Ω_p := 2*π*F_p = 3249.2  # Частота среза аналогового фильтра
Ω_s := 2*π*F_s = 13763.8  # Частота заграждения аналогового фильтра
# Порядок фильтра
ε_p := sqrt(10^(R_p/10) - 1) = 0.508847
ε_s := sqrt(10^(R_s/10) - 1) = 31.607
1/ε_s = 0.0316386
ε_s/ε_p = 62.1148
Ω_s/Ω_p = 4.23607
k_ω := ω_p/ω_s = 0.333333
k_ε := ε_p/ε_s = 0.0160992
# Порядок фильтра
N := T(k_ε)*K(k_ω)/(K(k_ε)*T(k_ω)) = 2.2458
N := ceil(N) = 3
# Число парных полюсов | Наличие/отсутсвтие центрального полюса
L := Trunc(N/2, 1) = 1
r := mod(N, 2) = 1
2*L + r = 3
u(n) := (2*n - 1)/N
un := matrix(L, 1, f(n, m) ← u(n + 1))
transpose(un) = [0.333333]
m := sqrt(1 - k_ε^2) = 0.99987
k_p := m^N*product(sn(u(n), m)^4, n = 1 .. L) = 0.816604
k_ω := sqrt(1 - k_p^2) = 0.577199
# Нули
zeros := 1i/(k_ω*cd(un, k_ω)) = [1.95359i]
Im(zeros) = [1.95359]
Ω_p/f_d = 0.649839
Ω_s/f_d = 2.75276
υ_0 := -1i/N*sn_inv(1i/ε_p, k_ε) = 0.303026
# Полюса
conj(z) := Re(z) - 1i*Im(z)
conj(1 + 3i) = 1 - 3i
p_p :=
    pp[0] ← 1i*sn(1i*υ_0, k_ω) if r > 0
    for n ∈ 0 .. L - 1
        pp[2*n + r] ← 1i*cd(un[n] - 1i*υ_0, k_ω)
        pp[2*n + 1 + r] ← conj(pp[2*n + r])
    pp
G_p := 1/sqrt(1 + ε_p^2) = 0.891251
p_p = [-0.559682; -0.205322 + 0.986987i; -0.205322 - 0.986987i]
p_0 := stack(zeros, conj(zeros)) = [1.95359i; -1.95359i]
G_0 := 1
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G_0 := product(-p_0[i], i = 0 .. rows(p_0) - 1)/product(-p_p[i], i = 0 .. rows(p_p) - 1) = 6.7097
H_0(p) := G_p^(1 - r)/G_0*product(p - p_0[i], i = 0 .. rows(p_0) - 1)/product(p - p_p[i], i = 0 .. rows(p_p) - 1)
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Ω_p = 3249.2
# Масштабируем передаточную функцию фильтра на требуемую частоту пропускания
Ω_p := 2*π*F_p
Ω_p = 3249.2
H(p) := H_0(p/Ω_p)
# Делаем преобразование плоскости p в плоскость z путём подстановки p == 2*f_d*(1 - z^-1)/(1 + z^-1)
H_z(z) := H(2*f_d*(1 - z^-1)/(1 + z^-1))
Polinom(P, p) := product(p - P[i], i = 0 .. rows(P) - 1)
# Масштабируем нули и полюса
2
p_01 := p_0*Ω_p
p_p1 := p_p*Ω_p
p_01 = [6347.6i; -6347.6i]
p_0 = [1.95359i; -1.95359i]
p_p1 = [-1818.52; -667.132 + 3206.91i; -667.132 - 3206.91i]
p_p = [-0.559682; -0.205322 + 0.986987i; -0.205322 - 0.986987i]
G_01 := product(-p_01[i], i = 0 .. rows(p_01) - 1)/product(-p_p1[i], i = 0 .. rows(p_p1) - 1) = 0.00206503
H_01(p) := G_p^(1 - r)/G_01*product(p - p_01[i], i = 0 .. rows(p_01) - 1)/product(p - p_p1[i], i = 0 .. rows(p_p1) - 1)
H_z1(z) := H_01(2*f_d*(1 - z^-1)/(1 + z^-1))
H_02(p) := G_p^(1 - r)/G_01*Polinom(p_01, p)/Polinom(p_p1, p)
H_z22(z) := H_02(2*f_d*(1 - z^-1)/(1 + z^-1))
# Преобразуем нули и полюса в плоскость Z(p, f_d) := (2*f_d + p)/(2*f_d - p)
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z_0 := vectorize(Z(p_01, f_d))
z_p := vectorize(Z(p_p1, f_d))
z_0 :=
    stack(-1, z_0) if r > 0
    z_0 otherwise
G_0z := 2^r*product(1 - z_0[n], n = r .. rows(z_0) - 1)/product(1 - z_p[n], n = 0 .. rows(z_p) - 1) = 21.584
z_0 = [-1; 0.425598 + 0.904912i; 0.425598 - 0.904912i]
z_p = [0.69226; 0.719507 + 0.516944i; 0.719507 - 0.516944i]
H_z2(z) := G_p^(1 - r)/G_0z*product(1 - z_0[n]*z^-1, n = 0 .. rows(z_0) - 1)/product(1 - z_p[n]*z^-1, n = 0 .. rows(z_p) - 1)
H_z2(1) = 1
abs(H_z2(e^(1i*2*π*F_s/f_d))) = 0.00941596
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arg(z_0) = [1; 0.360064; -0.360064]*π
FF := [0; F_p; F_s; f_d/2]
ff := [0; f_p; f_s; f_d/2]
vectorize(H_z2(e^(1i*2*π*ff/f_d))) = [1; -0.7599 - 0.465815i; 0.00670773 - 0.02817i; -2.9651e-18i]
vectorize(|H_z2(e^(1i*2*π*ff/f_d))|) = [1; 0.891309; 0.0289576; 0]
vectorize(|H_z2(e^(1i*2*π*FF/f_d))|) = [1; 0.807052; 0.00941596; 0]
H1(p) := H_01(p)
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20*log(abs(H_z(e^(1i*2*π*f_s/f_d)))) = -30.7647
hh_z2 := vectorize(h(tt, H(f) ← H_z2(e^(1i*2*π*f/f_d))))
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ff := 0, f_s/100 .. f_s
|H_z(e^(1i*2*π*f_p/f_d))| = 0.891309
20*log(|H_z(e^(1i*2*π*f_p/f_d))|) = -0.999437
|H_z(e^(1i*2*π*f_s/f_d))| = 0.0289576
20*log(|H_z(e^(1i*2*π*f_s/f_d))|) = -30.7647
Φ(f) := integral(d/df1(arg(H_z(e^(1i*2*π*f1/f_d)))/π), f1 = 0 .. f)
|H_z(e^(1i*2*π*(f_p + f_s)/2/f_d))| = 0.0187177
20*log(|H_z(e^(1i*2*π*(f_p + f_s)/2/f_d))|) = -34.555
(f_p + f_s)/2 = 1000
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