# Рассчёт фильтра Чебышева I-рода
# https://ru.dsplib.org/content/filter_cheby1_ap/filter_cheby1_ap.html
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db(x) := 10^(x/20)
db_P(x) := 10^(x/10)
to_db(x) := 20*log(|x|)
to_dbP(x) := 10*log(|x|)
roundup(x) := Trunc(x, 1) + (Trunc(x, 1) ≠ x)
abs(z) := |z|
samples := 100
n := 0 .. samples - 1
circle_x[n] := cos(2*π/(samples - 1)*n)
circle_y[n] := sin(2*π/(samples - 1)*n)
Ki(k) :=
    k_0 ← k/(1 + sqrt(1 - k*k))
    k_0*k_0
K(k) :=
    ki ← Ki(k)
    (1 + ki)*K(ki) if k - ki > 0
    π/2 otherwise
T(k) := K(sqrt(1 - k*k))
sn(u, k) :=
    ki ← Ki(k)
    sin(u*π/2) if k - ki ≤ 0
    otherwise
        w ← sn(u, ki)
        (1 + ki)/(1/w + ki*w)
cd(u, k) :=
    ki ← Ki(k)
    cos(u*π/2) if k - ki ≤ 0
    otherwise
        w ← cd(u, ki)
        (1 + ki)/(1/w + ki*w)
sn_inv(sn, k) :=
    ki ← Ki(k)
    sn_inv(2*sn/((1 + ki)*(1 + sqrt(1 - k*k*sn*sn))), ki) if k - ki > 0
    2*asin(sn)/π
cd_inv(cn, k) :=
    ki ← Ki(k)
    cd_inv(2*cn/((1 + ki)*(1 + sqrt(1 - k*k*cn*cn))), ki) if k - ki > 0
    2*acos(cn)/π
K(0.66667) = 1.80967
T(0.66667) = 1.90424
K(0.0028615) = 1.5708
T(0.0028615) = 7.24272
Z(p_0, f_d) := (2*f_d + p_0)/(2*f_d - p_0)
z2p(z_0, f_d) := 2*f_d*(1 - z_0^-1)/(1 + z_0^-1)
cd(0.6, 0.93) = 0.761809
sn(0.6, 0.93) = 0.917919
# 0.917918 | 0.761809423
C(N, ω) := cos(N*acos(ω))
sh(x) := sinh(x)
ch(x) := cosh(x)
arsh(x) := asinh(x)
arch(x) := acosh(x)
f_p := 5000/(2*π) = 795.775
# Гц - частота пропускания
f_d := 5000  # Гц - частота дискретизации
f_s := 2*5000/(2*π) = 1591.55
# Гц - частота подавления
dt := 1/f_d = 0.0002
tt[n] := n*dt
h(t, H) := 1/f_d*integral(H(f)*e^(1i*2*π*f*t), f = -f_d/2 .. f_d/2)
ω_p := 2*π*f_p/f_d = 0.31831*π
# Нормированная полоса среза
ω_p = 1
ω_s := 2*π*f_s/f_d = 0.63662*π
# Нормированная полоса заграждения
ω_s = 2
R_p := 1.5
G_p := (-R_p) db = 0.841395  # Неравномерность в полосе пропускания (дБ)
R_s := 35
G_s := (-R_s) db = 0.0177828  # Уровень подавления в полосе заграждения (дБ)
df := f_d/samples = 50
Ω(T_d, ω) := 2/T_d*tan(ω/2)  # Преобразование частот аналогового фильтра в частоты цифрового
f_analog(f_digital., f_d) := f_d/π*tan(π*f_digital./f_d)
f_digit(f_analog, f_d) := f_d/π*atan(π*f_analog/f_d)
F_p := f_analog(f_p, f_d) = 869.467
F_p = 0.173893 f_d
f_digit(F_p, f_d) = 795.775
F_s := f_analog(f_s, f_d) = 2478.69
F_s = 0.495738 f_d
Ω_p := 2*π*F_p = 5463.02  # Частота среза аналогового фильтра
Ω_s := 2*π*F_s = 15574.1  # Частота заграждения аналогового фильтра
# Порядок фильтра
ε_p := sqrt(10^(R_p/10) - 1) = 0.642291
ε_s := sqrt(10^(R_s/10) - 1) = 56.2252
1/ε_s = 0.0177856
G_p := 1/sqrt(1 + ε_p^2) = 0.841395
ε_s/ε_p = 87.5386
Ω_s/Ω_p = 2.85082
k_ω := ω_p/ω_s = 0.5
k_ε := ε_p/ε_s = 0.0114235
# Порядок фильтра
N := arch(ε_s/ε_p)/arch(f_s/f_p) = 3.92206
N := ceil(N) = 4
# Число парных полюсов | Наличие/отсутсвтие центрального полюса
L := Trunc(N/2, 1) = 2
r := mod(N, 2) = 0
2*L + r = 4
G_p := 1/sqrt(1 + ε_p^2) = 0.841395
β := 1/N*arsh(1/ε_p) = 0.306483
θ(n) := (2*n - 1)/(2*N)*π
θ(n) := π/N*(n - 1/2)
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poles(r, L) :=
    i ← 0
    if r ≠ 0
        P[i] ← -sh(β)
        i ← 1
    for n ∈ 1 .. L
        P[i] ← -sh(β)*sin(θ(n)) + 1i*ch(β)*cos(θ(n))
        P[i + 1] ← -sh(β)*sin(θ(n)) - 1i*ch(β)*cos(θ(n))
        i ← i + 2
    P
p0 := poles(r, L)
p0 = [-0.119131 + 0.967611i; -0.119131 - 0.967611i; -0.287607 + 0.400798i; -0.287607 - 0.400798i]
G_0 := 1/product(-p0[i], i = 0 .. rows(p0) - 1)
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G_0 = 4.32336
H_0(p) := G_p^(1 - r)/G_0*1/product(p - p0[i], i = 0 .. rows(p0) - 1)
H_0(0) = 0.841395
Ω_p = 5463.02
# Масштабируем передаточную функцию фильтра на требуемую частоту пропускания
Ω_p := 2*π*F_p
Ω_p = 5463.02
H(p) := H_0(p/(Ω_p/ω_p))
# Делаем преобразование плоскости p в плоскость z путём подстановки p == 2*f_d*(1 - z^-1)/(1 + z^-1)
Polinom(P, p) := product(p - P[i], i = 0 .. rows(P) - 1)
H_z(z) := H(2*f_d*(1 - z^-1)/(1 + z^-1))
Ω_p = 5463.02
# Масштабируем нули и полюса
p_01 := p0*Ω_p/ω_p
p_01 = [-650.814 + 5286.08i; -650.814 - 5286.08i; -1571.2 + 2189.57i; -1571.2 - 2189.57i]
G_01 := 1/product(|p_01[i]|, i = 0 .. rows(p_01) - 1) = 4.85388e-15
H_01(p) := G_p^(1 - r)/1*1/product(p - p_01[i], i = 0 .. rows(p_01) - 1)
H_z1(z) := H_01(2*f_d*(1 - z^-1)/(1 + z^-1))
H_02(p) := G_p^(1 - r)/G_01*1/Polinom(p_01, p)
H_z22(z) := H_02(2*f_d*(1 - z^-1)/(1 + z^-1))
ff := [0; f_p; f_s; f_d/2] = [0; 795.775; 1591.55; 2500]
# Преобразуем нули и полюса в плоскость Z(p, f_d) := (2*f_d + p)/(2*f_d - p)
[G_p^(1 - r); G_p; G_s; 0] = [0.841395; 0.841395; 0.0177828; 0]
vectorize(|H_z22(e^(1i*2*π*ff/f_d))|) = [0.841395; 0.841395; 0.00335263; 0]
z_0 := vectorize(Z(p_01, f_d))
G_0 = 4.32336
z_0 = [0.506666 + 0.74777i; 0.506666 - 0.74777i; 0.668679 + 0.315757i; 0.668679 - 0.315757i]
G_0z := 2^N*1/product(1 - z_0[n], n = 0 .. rows(z_0) - 1) = 95.1744
1/G_0z = 0.010507
H_z2(z) := G_p^(1 - r)/G_0z*(1 + z^-1)^N/product(1 - z_0[n]*z^-1, n = 0 .. rows(z_0) - 1)
[G_p^(1 - r); G_p; G_s; 0] = [0.841395; 0.841395; 0.0177828; 0]
vectorize(|H_z2(e^(1i*2*π*ff/f_d))|) = [0.841395; 0.841395; 0.00335263; 0]
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G_p = 0.841395
H1(p) := H_01(p)
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hh_z2 := vectorize(h(tt, H(f) ← H_z2(e^(1i*2*π*f/f_d))))
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3/f_p/dt = 18.8496
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ff := 0, f_s/100 .. f_s
Φ(f) := integral(d/df1(arg(H_z(e^(1i*2*π*f1/f_d)))/π), f1 = 0 .. f)
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